# OpenSim document version 30000
Model JW All Body-scaled:
  length_units: meters
  force_units: N
  gravity: 0 -9.80665 0
  credits:
    Romain Leberre and Ilan Eskinazi, Computational Biomechanics Lab, University of Florida
  publications:
    Fregly, B.J., Besier, T.F., Lloyd, D.G., Delp, S.L., Banks, S.A., Pandy, M.G., and D'Lima, D.D. (2012) Grand challenge competition to predict in vivo knee loads. Journal of Orthopaedic Research 30(4):503-513
  BodySet:
    Body ground: mass=0 mass_center=(0 0 0) inertia_xx=0 inertia_yy=0 inertia_zz=0
    Body pelvis: mass=9.534592 mass_center=(-0.0672 0 0) inertia_xx=0.08321325 inertia_yy=0.07050265
        inertia_zz=0.04691033 meshes=pelvis.vtp
      CustomJoint ground_pelvis: parent_body=ground location_in_parent=(0 0 0) location=(0 0 0)
        Coordinate pelvis_rz: motion_type=rotational default_value=0 range=(-3.1416 3.1416) clamped=true
        Coordinate pelvis_rx: motion_type=rotational default_value=0 range=(-3.1416 3.1416) clamped=true
        Coordinate pelvis_ry: motion_type=rotational default_value=0 range=(-3.1416 3.1416) clamped=true
        Coordinate pelvis_tx: motion_type=translational default_value=0 range=(-5 5) clamped=true
        Coordinate pelvis_ty: motion_type=translational default_value=0 range=(-2 2) clamped=true
        Coordinate pelvis_tz: motion_type=translational default_value=0 range=(-2 2) clamped=true
        SpatialTransform:
          TransformAxis rotation1: coordinates=pelvis_rz axis=(0 0 1) LinearFunction(coefficients=1 0)
          TransformAxis rotation2: coordinates=pelvis_rx axis=(1 0 0) LinearFunction(coefficients=1 0)
          TransformAxis rotation3: coordinates=pelvis_ry axis=(0 1 0) LinearFunction(coefficients=1 0)
          TransformAxis translation1: coordinates=pelvis_tx axis=(1 0 0) LinearFunction(coefficients=1 0)
          TransformAxis translation2: coordinates=pelvis_ty axis=(0 1 0) LinearFunction(coefficients=1 0)
          TransformAxis translation3: coordinates=pelvis_tz axis=(0 0 1) LinearFunction(coefficients=1 0)
      WrapEllipsoid PS_at_brim: xyz_body_rotation=(1.6232 0 0.13963) translation=(-0.064 -0.088699 0.056739)
          quadrant=all dimensions=(0.0494 0.071 0.0492)
      WrapEllipsoid IL_at_brim: xyz_body_rotation=(1.5184 1.5184 -1.42) translation=(-0.068 -0.078059 0.097311)
          quadrant=all dimensions=(0.071 0.0665 0.063)
      WrapEllipsoid Gmax_at_pelvis: xyz_body_rotation=(2.5045 1.1772 -1.4312) translation=(-0.068062 -0.10561 0.056754)
          quadrant=all dimensions=(0.04 0.059615 0.038245)
    Body femur: mass=7.530342 mass_center=(0 -0.17 0) inertia_xx=0.1083601 inertia_yy=0.02843881 inertia_zz=0.1143039
        meshes=femur.vtp
      CustomJoint hip: parent_body=pelvis location_in_parent=(-0.041283 -0.098 0.084432) location=(0 0 0)
        Coordinate hip_flexion: motion_type=rotational default_value=0 range=(-0.7 1.5708) clamped=true
        Coordinate hip_adduction: motion_type=rotational default_value=0 range=(-0.52 0.1745329) clamped=true
        Coordinate hip_rotation: motion_type=rotational default_value=0 range=(-0.52 0.52) clamped=true
        SpatialTransform: axes_held_at_zero=(translation1 translation2 translation3)
          TransformAxis rotation1: coordinates=hip_flexion axis=(0 0 1) LinearFunction(coefficients=1 0)
          TransformAxis rotation2: coordinates=hip_adduction axis=(1 0 0) LinearFunction(coefficients=1 0)
          TransformAxis rotation3: coordinates=hip_rotation axis=(0 1 0) LinearFunction(coefficients=1 0)
      WrapEllipsoid Gastroc_at_Condyles: xyz_body_rotation=(1.5852 0.012946 0.0069804) translation=(-0.007 -0.40611 0)
          quadrant=all dimensions=(0.035 0.047 0.031)
      WrapEllipsoid AB_at_femshaft: xyz_body_rotation=(-1.5116 1.4718 1.5975) translation=(0.036616 -0.11702 0.011377)
          quadrant=all dimensions=(0.023085 0.070102 0.018135)
      WrapEllipsoid AL_at_femshaft: xyz_body_rotation=(0.085138 0.00087026 3.1048)
          translation=(0.033382 -0.23873 0.0010648) quadrant=all dimensions=(0.022107 0.10007 0.019788)
      WrapEllipsoid AMprox_at_femshaft: xyz_body_rotation=(-1.5029 1.4318 1.5919)
          translation=(0.031048 -0.076734 0.014781) quadrant=all dimensions=(0.035177 0.070159 0.023172)
      WrapEllipsoid AMmid_at_femshaft: xyz_body_rotation=(-1.4827 1.5302 1.5684)
          translation=(0.039329 -0.16116 0.0076421) quadrant=all dimensions=(0.034079 0.12009 0.023537)
      WrapEllipsoid AMdist_at_femshaft: xyz_body_rotation=(-3.0519 0.052408 -1.6689)
          translation=(0.02823 -0.26116 -0.0030836) quadrant=all dimensions=(0.20029 0.023961 0.023634)
      WrapEllipsoid AMisch_at_condyles: xyz_body_rotation=(0.093757 0.012526 2.5737)
          translation=(-0.035849 -0.37295 -0.010385) quadrant=all dimensions=(0.053622 0.24634 0.04419)
      WrapEllipsoid PECT_at_femshaft: xyz_body_rotation=(0.086223 -0.0044349 0.13961)
          translation=(-0.0029285 -0.40119 -0.0032449) quadrant=all dimensions=(0.01823 0.050113 0.014401)
      WrapCylinder KnExt_at_fem: xyz_body_rotation=(-0.083854 0.064455 0.0054139)
          translation=(-0.0029285 -0.40119 -0.0032449) quadrant=all radius=0.026259 length=0.1099
    Body femoral_component: mass=0.009144313 mass_center=(0 0 0) inertia_xx=9.144313e-5 inertia_yy=9.144313e-5
        inertia_zz=9.144313e-5 meshes=femoral_component.vtp
      WeldJoint femoral_component_weld: parent_body=femur location_in_parent=(0 -0.39335 0)
          orientation_in_parent=(3.083 0 -3.083) location=(0 0 0)
      WrapCylinder femoral_component_obstruction: translation=(0.00756 0.00476 0) quadrant=all radius=0.0422 length=0.1
    Body tibial_tray: mass=0.009144313 mass_center=(0 0 0) inertia_xx=9.144313e-5 inertia_yy=9.144313e-5
        inertia_zz=9.144313e-5 meshes=tibial_tray.vtp
      CustomJoint knee: parent_body=femoral_component location_in_parent=(0 0 0) location=(0 0 0) reverse=true
        Coordinate knee_adduction: motion_type=rotational default_value=3.296783e-8 range=(-0.523 0.523) clamped=false
        Coordinate knee_rotation: motion_type=rotational default_value=-1.290318e-9 range=(-0.523 0.523) clamped=false
        Coordinate knee_flexion: motion_type=rotational default_value=0 range=(-2.513 0.3490659) clamped=true
        Coordinate knee_tx: motion_type=translational default_value=-1.466376e-17 range=(-0.1 0.1) clamped=false
        Coordinate knee_ty: motion_type=translational default_value=0.04190723 range=(-0.1 0.1) clamped=true
        Coordinate knee_tz: motion_type=translational default_value=1.004346e-9 range=(-0.1 0.1) clamped=false
            locked=true
        SpatialTransform:
          TransformAxis rotation1: coordinates=knee_flexion axis=(0 0 1) LinearFunction(coefficients=1 0)
          TransformAxis rotation2: coordinates=knee_adduction axis=(1 0 0) LinearFunction(coefficients=1 0)
          TransformAxis rotation3: coordinates=knee_rotation axis=(0 1 0) LinearFunction(coefficients=1 0)
          TransformAxis translation1: coordinates=knee_tx axis=(1 0 0) LinearFunction(coefficients=1 0)
          TransformAxis translation2: coordinates=knee_ty axis=(0 1 0) LinearFunction(coefficients=1 0)
          TransformAxis translation3: coordinates=knee_tz axis=(0 0 1) LinearFunction(coefficients=1 0)
    Body tibia: mass=3.001621 mass_center=(0 -0.2054 0) inertia_xx=0.04078364 inertia_yy=0.004114941
        inertia_zz=0.0413323 meshes=(tibia.vtp fibula.vtp)
      WeldJoint tibial_tray_weld: parent_body=tibial_tray location_in_parent=(0 0.044254 0)
          orientation_in_parent=(0 3.1416 0) location=(0 0 0)
      WrapEllipsoid GR_at_condyles: xyz_body_rotation=(1.5708 1.3 0) translation=(-0.005 -0.00649 -0.0065) quadrant=all
          dimensions=(0.069663 0.0533 0.036096)
      WrapEllipsoid SM_at_condyles: xyz_body_rotation=(-1.5708 -1.4089 -3.1416) translation=(-0.005 -0.00649 -0.0065)
          quadrant=all dimensions=(0.065765 0.0489 0.035443)
      WrapEllipsoid ST_at_condyles: xyz_body_rotation=(1.9464 1.3309 -1.9366) translation=(-0.005 -0.00649 -0.0065)
          quadrant=all dimensions=(0.0572 0.075471 0.042741)
      WrapEllipsoid BFLH_at_gastroc: xyz_body_rotation=(1.5708 0.41864 0) translation=(-0.051 -0.074 -0.00040772)
          quadrant=-z dimensions=(0.03378 0.0833 0.021818)
      WrapCylinder Gastroc_at_Shank: xyz_body_rotation=(-0.27869 -0.028284 1.5627)
          translation=(-0.012659 -0.08789 -0.0091425) quadrant=y radius=0.057655 length=0.18
    Body patella: mass=0.06977111 mass_center=(0.0026 -0.0018 0) inertia_xx=1.061655e-5 inertia_yy=2.322656e-6
        inertia_zz=1.061655e-5 meshes=pat.vtp
      CustomJoint patfem: parent_body=femoral_component location_in_parent=(0 0 0) location=(0 0 0) reverse=true
        Coordinate patfem_adduction: motion_type=rotational default_value=-1.156646e-19 range=(-3.1416 3.1416)
            clamped=true locked=true
        Coordinate patfem_rotation: motion_type=rotational default_value=9.473626e-7 range=(-3.1416 3.1416)
            clamped=true locked=true
        Coordinate patfem_flexion: motion_type=rotational default_value=1.4137 range=(-3.1416 3.1416) clamped=true
        Coordinate patfem_tx: motion_type=translational default_value=2.873515e-11 range=(-5 5) clamped=true
            locked=true
        Coordinate patfem_ty: motion_type=translational default_value=0.03999883 range=(-2 2) clamped=true locked=true
        Coordinate patfem_tz: motion_type=translational default_value=2.74971e-13 range=(-2 2) clamped=true locked=true
        SpatialTransform:
          TransformAxis rotation1: coordinates=patfem_adduction axis=(1 0 0) LinearFunction(coefficients=1 0)
          TransformAxis rotation2: coordinates=patfem_rotation axis=(0 1 0) LinearFunction(coefficients=1 0)
          TransformAxis rotation3: coordinates=patfem_flexion axis=(0 0 1) LinearFunction(coefficients=1 0)
          TransformAxis translation1: coordinates=patfem_tx axis=(1 0 0) LinearFunction(coefficients=1 0)
          TransformAxis translation2: coordinates=patfem_ty axis=(0 1 0) LinearFunction(coefficients=1 0)
          TransformAxis translation3: coordinates=patfem_tz axis=(0 0 1) LinearFunction(coefficients=1 0)
      WrapEllipsoid patella_surface_ellipsoid: translation=(0.007 0 0) quadrant=all dimensions=(0.0227 0.017 0.025)
      WrapCylinder patella_surface: translation=(0 0.044 0) active=false quadrant=all radius=0.044 length=0.1
    Body talus: mass=0.08092717 mass_center=(0 0 0) inertia_xx=0.0008096009 inertia_yy=0.0008096009
        inertia_zz=0.0008096009 meshes=talus.vtp
      CustomJoint ankle: parent_body=tibia location_in_parent=(0 -0.44751 0)
          orientation_in_parent=(-0.041214 0.0031538 -0.050218) location=(0 0 0)
        Coordinate ankle_angle: motion_type=rotational default_value=0 range=(-0.5235988 0.3490659) clamped=true
        SpatialTransform: axes_held_at_zero=(rotation2 rotation3 translation1 translation2 translation3)
          TransformAxis rotation1: coordinates=ankle_angle axis=(-0.16149 -0.027235 0.986)
              LinearFunction(coefficients=1 0)
    Body calcaneus: mass=1.012001 mass_center=(0.1 0.03 0) inertia_xx=0.001097318 inertia_yy=0.00320051
        inertia_zz=0.003291953 meshes=foot.vtp
      CustomJoint subtalar: parent_body=talus location_in_parent=(-0.043062 -0.04869 0.018)
          orientation_in_parent=(-0.11332 0.12598 0.019146) location=(0 0 0)
        Coordinate subtalar_angle: motion_type=rotational default_value=0 range=(-0.3490659 0.3490659) clamped=true
        SpatialTransform: axes_held_at_zero=(rotation2 rotation3 translation1 translation2 translation3)
          TransformAxis rotation1: coordinates=subtalar_angle axis=(0.72089 0.68935 -0.073236)
              LinearFunction(coefficients=1 0)
    Body toes: mass=0.1753879 mass_center=(0.0346 0.006 -0.0175) inertia_xx=8.096375e-5 inertia_yy=0.0001619184
        inertia_zz=0.0008096009 meshes=bofoot.vtp
      CustomJoint mtp: parent_body=calcaneus location_in_parent=(0.17664 0.0043199 0.0021898)
          orientation_in_parent=(0.20251 0.096222 0.23426) location=(0 0 0)
        Coordinate mtp_angle: motion_type=rotational default_value=0 range=(-0.5235988 0.5235988) clamped=true
        SpatialTransform: axes_held_at_zero=(rotation2 rotation3 translation1 translation2 translation3)
          TransformAxis rotation1: coordinates=mtp_angle axis=(0.74076 -0.00095523 -0.67146)
              LinearFunction(coefficients=1 0)
    Body femur_l: mass=7.530342 mass_center=(0 -0.17 0) inertia_xx=0.1083601 inertia_yy=0.02843881 inertia_zz=0.1143039
        meshes=femur_l.vtp
      CustomJoint hip_l: parent_body=pelvis location_in_parent=(-0.041283 -0.098 -0.084432) location=(0 0 0)
        Coordinate hip_flexion_l: motion_type=rotational default_value=0 range=(-0.7 1.5708) clamped=true
        Coordinate hip_adduction_l: motion_type=rotational default_value=0 range=(-0.52 0.1745329) clamped=true
        Coordinate hip_rotation_l: motion_type=rotational default_value=0 range=(-0.52 0.52) clamped=true
        SpatialTransform: axes_held_at_zero=(translation1 translation2 translation3)
          TransformAxis rotation1: coordinates=hip_flexion_l axis=(0 0 1) LinearFunction(coefficients=1 0)
          TransformAxis rotation2: coordinates=hip_adduction_l axis=(-1 0 0) LinearFunction(coefficients=1 0)
          TransformAxis rotation3: coordinates=hip_rotation_l axis=(0 -1 0) LinearFunction(coefficients=1 0)
      WrapEllipsoid Gastroc_at_Condyles_l: xyz_body_rotation=(1.5852 0.012946 0.0069804)
          translation=(-0.007 -0.40611 0) quadrant=all dimensions=(0.035 0.047 0.031)
      WrapEllipsoid AB_at_femshaft_l: xyz_body_rotation=(-1.5116 1.4718 1.5975)
          translation=(0.036616 -0.11702 0.011377) quadrant=all dimensions=(0.023085 0.070102 0.018135)
      WrapEllipsoid AL_at_femshaft_l: xyz_body_rotation=(0.085138 0.00087026 3.1048)
          translation=(0.033382 -0.23873 0.0010648) quadrant=all dimensions=(0.022107 0.10007 0.019788)
      WrapEllipsoid AMprox_at_femshaft_l: xyz_body_rotation=(-1.5029 1.4318 1.5919)
          translation=(0.031048 -0.076734 0.014781) quadrant=all dimensions=(0.035177 0.070159 0.023172)
      WrapEllipsoid AMmid_at_femshaft_l: xyz_body_rotation=(-1.4827 1.5302 1.5684)
          translation=(0.039329 -0.16116 0.0076421) quadrant=all dimensions=(0.034079 0.12009 0.023537)
      WrapEllipsoid AMdist_at_femshaft_l: xyz_body_rotation=(-3.0519 0.052408 -1.6689)
          translation=(0.02823 -0.26116 -0.0030836) quadrant=all dimensions=(0.20029 0.023961 0.023634)
      WrapEllipsoid AMisch_at_condyles_l: xyz_body_rotation=(0.093757 0.012526 2.5737)
          translation=(-0.035849 -0.37295 -0.010385) quadrant=all dimensions=(0.053622 0.24634 0.04419)
      WrapEllipsoid PECT_at_femshaft_l: xyz_body_rotation=(0.086223 -0.0044349 0.13961)
          translation=(-0.0029285 -0.40119 -0.0032449) quadrant=all dimensions=(0.01823 0.050113 0.014401)
      WrapCylinder KnExt_at_fem_l: xyz_body_rotation=(-0.083854 0.064455 0.0054139)
          translation=(-0.0029285 -0.40119 -0.0032449) quadrant=all radius=0.026259 length=0.1099
    Body tibia_l: mass=3.001621 mass_center=(0 -0.2054 0) inertia_xx=0.04078364 inertia_yy=0.004114941
        inertia_zz=0.0413323 meshes=(tibia_l.vtp fibula_l.vtp)
      CustomJoint knee_l: parent_body=femur_l location_in_parent=(0 -0.39335 0) location=(0 -0.044254 0) reverse=true
        Coordinate knee_adduction_l: motion_type=rotational default_value=3.296783e-8 range=(-0.523 0.523)
            clamped=false locked=true
        Coordinate knee_rotation_l: motion_type=rotational default_value=1.080135e-19 range=(-0.523 0.523)
            clamped=false locked=true
        Coordinate knee_flexion_l: motion_type=rotational default_value=0 range=(-2.513 0.3490659) clamped=true
        Coordinate knee_tx_l: motion_type=translational default_value=-1.466376e-17 range=(-0.1 0.1) clamped=false
            locked=true
        Coordinate knee_ty_l: motion_type=translational default_value=0.04190696 range=(-0.1 0.1) clamped=true
            locked=true
        Coordinate knee_tz_l: motion_type=translational default_value=1.004346e-9 range=(-0.1 0.1) clamped=false
            locked=true
        SpatialTransform:
          TransformAxis rotation1: coordinates=knee_flexion_l axis=(0 0 -1) LinearFunction(coefficients=1 0)
          TransformAxis rotation2: coordinates=knee_adduction_l axis=(1 0 0) LinearFunction(coefficients=1 0)
          TransformAxis rotation3: coordinates=knee_rotation_l axis=(0 -1 0) LinearFunction(coefficients=1 0)
          TransformAxis translation1: coordinates=knee_tx_l axis=(1 0 0) LinearFunction(coefficients=1 0)
          TransformAxis translation2: coordinates=knee_ty_l axis=(0 1 0) LinearFunction(coefficients=1 0)
          TransformAxis translation3: coordinates=knee_tz_l axis=(0 0 -1) LinearFunction(coefficients=1 0)
      WrapEllipsoid GR_at_condyles_l: xyz_body_rotation=(1.5708 1.3 0) translation=(-0.005 -0.00649 -0.0065)
          quadrant=all dimensions=(0.069663 0.0533 0.036096)
      WrapEllipsoid SM_at_condyles_l: xyz_body_rotation=(-1.5708 -1.4089 -3.1416) translation=(-0.005 -0.00649 -0.0065)
          quadrant=all dimensions=(0.065765 0.0489 0.035443)
      WrapEllipsoid ST_at_condyles_l: xyz_body_rotation=(1.9464 1.3309 -1.9366) translation=(-0.005 -0.00649 -0.0065)
          quadrant=all dimensions=(0.0572 0.075471 0.042741)
      WrapEllipsoid BFLH_at_gastroc_l: xyz_body_rotation=(1.5708 0.41864 0) translation=(-0.051 -0.074 -0.00040772)
          quadrant=-z dimensions=(0.03378 0.0833 0.021818)
      WrapCylinder Gastroc_at_Shank_l: xyz_body_rotation=(-0.27869 -0.028284 1.5627)
          translation=(-0.012659 -0.08789 -0.0091425) quadrant=y radius=0.057655 length=0.18
    Body patella_l: mass=0.06977111 mass_center=(0.0026 -0.0018 0) inertia_xx=1.061655e-5 inertia_yy=2.322656e-6
        inertia_zz=1.061655e-5 meshes=patella_l.vtp
      CustomJoint patfem_l: parent_body=femur_l location_in_parent=(0 -0.39335 0) location=(-0.045 0.03 0)
          orientation=(0 0 1.57) reverse=true
        Coordinate patfem_adduction_l: motion_type=rotational default_value=-1.156646e-19 range=(-3.1416 3.1416)
            clamped=true locked=true
        Coordinate patfem_rotation_l: motion_type=rotational default_value=9.473626e-7 range=(-3.1416 3.1416)
            clamped=true locked=true
        Coordinate patfem_flexion_l: motion_type=rotational default_value=1.4137 range=(-3.1416 3.1416) clamped=true
        Coordinate patfem_tx_l: motion_type=translational default_value=2.873515e-11 range=(-5 5) clamped=true
            locked=true
        Coordinate patfem_ty_l: motion_type=translational default_value=-2.097475e-9 range=(-2 2) clamped=true
            locked=true
        Coordinate patfem_tz_l: motion_type=translational default_value=2.74971e-13 range=(-2 2) clamped=true
            locked=true
        SpatialTransform:
          TransformAxis rotation1: coordinates=patfem_adduction_l axis=(-1 0 0) LinearFunction(coefficients=1 0)
          TransformAxis rotation2: coordinates=patfem_rotation_l axis=(0 1 0) LinearFunction(coefficients=1 0)
          TransformAxis rotation3: coordinates=patfem_flexion_l axis=(0 0 -1) LinearFunction(coefficients=1 0)
          TransformAxis translation1: coordinates=patfem_tx_l axis=(1 0 0) LinearFunction(coefficients=1 0)
          TransformAxis translation2: coordinates=patfem_ty_l axis=(0 1 0) LinearFunction(coefficients=1 0)
          TransformAxis translation3: coordinates=patfem_tz_l axis=(0 0 1) LinearFunction(coefficients=1 0)
      WrapEllipsoid patella_surface_ellipsoid_l: translation=(0.007 0 0) quadrant=all dimensions=(0.0227 0.017 0.025)
      WrapCylinder patella_surface_l: translation=(0 0.044 0) active=false quadrant=all radius=0.044 length=0.1
    Body talus_l: mass=0.08092717 mass_center=(0 0 0) inertia_xx=0.0008096009 inertia_yy=0.0008096009
        inertia_zz=0.0008096009 meshes=talus_lv.vtp
      CustomJoint ankle_l: parent_body=tibia_l location_in_parent=(0 -0.44751 0)
          orientation_in_parent=(-0.041214 0.0031538 -0.050218) location=(0 0 0)
        Coordinate ankle_angle_l: motion_type=rotational default_value=0 range=(-0.5235988 0.3490659) clamped=true
        SpatialTransform: axes_held_at_zero=(rotation2 rotation3 translation1 translation2 translation3)
          TransformAxis rotation1: coordinates=ankle_angle_l axis=(0.16149 0.027235 0.986)
              LinearFunction(coefficients=1 0)
    Body calcaneus_l: mass=1.012001 mass_center=(0.1 0.03 0) inertia_xx=0.001097318 inertia_yy=0.00320051
        inertia_zz=0.003291953 meshes=l_foot.vtp
      CustomJoint subtalar_l: parent_body=talus_l location_in_parent=(-0.043062 -0.04869 -0.018)
          orientation_in_parent=(0.11332 -0.12598 0.019146) location=(0 0 0)
        Coordinate subtalar_angle_l: motion_type=rotational default_value=0 range=(-0.3490659 0.3490659) clamped=true
        SpatialTransform: axes_held_at_zero=(rotation2 rotation3 translation1 translation2 translation3)
          TransformAxis rotation1: coordinates=subtalar_angle_l axis=(-0.72089 -0.68935 -0.073236)
              LinearFunction(coefficients=1 0)
    Body toes_l: mass=0.1753879 mass_center=(0.0346 0.006 -0.0175) inertia_xx=8.096375e-5 inertia_yy=0.0001619184
        inertia_zz=0.0008096009 meshes=l_bofoot.vtp
      CustomJoint mtp_l: parent_body=calcaneus_l location_in_parent=(0.17664 0.0043199 -0.0021898)
          orientation_in_parent=(-0.20251 -0.096222 0.23426) location=(0 0 0)
        Coordinate mtp_angle_l: motion_type=rotational default_value=0 range=(-0.5235988 0.5235988) clamped=true
        SpatialTransform: axes_held_at_zero=(rotation2 rotation3 translation1 translation2 translation3)
          TransformAxis rotation1: coordinates=mtp_angle_l axis=(-0.74076 0.00095523 -0.67146)
              LinearFunction(coefficients=1 0)
    Body torso: mass=20.78839 mass_center=(-0.0296672 0.31645 0) inertia_xx=1.081985 inertia_yy=0.5016933
        inertia_zz=1.081985 meshes=(hat_spine.vtp hat_jaw.vtp hat_skull.vtp hat_ribs_scap.vtp)
      CustomJoint back: parent_body=pelvis location_in_parent=(-0.1007 0.0815 0) location=(0 0 0)
        Coordinate lumbar_extension: motion_type=rotational default_value=0 range=(-1.570796 1.570796) clamped=true
        Coordinate lumbar_bending: motion_type=rotational default_value=0 range=(-1.570796 1.570796) clamped=true
        Coordinate lumbar_rotation: motion_type=rotational default_value=0 range=(-1.570796 1.570796) clamped=true
        SpatialTransform: axes_held_at_zero=(translation1 translation2 translation3)
          TransformAxis rotation1: coordinates=lumbar_extension axis=(0 0 1) LinearFunction(coefficients=1 0)
          TransformAxis rotation2: coordinates=lumbar_bending axis=(1 0 0) LinearFunction(coefficients=1 0)
          TransformAxis rotation3: coordinates=lumbar_rotation axis=(0 1 0) LinearFunction(coefficients=1 0)
    Body humerus_r: mass=2.176456 mass_center=(0 -0.173391 0) inertia_xx=0.01421196 inertia_yy=0.004902685
        inertia_zz=0.01595247 meshes=humerus_rv.vtp
      CustomJoint acromial_r: parent_body=torso location_in_parent=(0.003120001 0.3673789 0.1473134) location=(0 0 0)
        Coordinate arm_flex_r: motion_type=rotational default_value=0 range=(-1.570796 1.570796) clamped=true
        Coordinate arm_add_r: motion_type=rotational default_value=0 range=(-2.094395 1.570796) clamped=true
        Coordinate arm_rot_r: motion_type=rotational default_value=0 range=(-1.570796 1.570796) clamped=true
        SpatialTransform: axes_held_at_zero=(translation1 translation2 translation3)
          TransformAxis rotation1: coordinates=arm_flex_r axis=(0 0 1) LinearFunction(coefficients=1 0)
          TransformAxis rotation2: coordinates=arm_add_r axis=(1 0 0) LinearFunction(coefficients=1 0)
          TransformAxis rotation3: coordinates=arm_rot_r axis=(0 1 0) LinearFunction(coefficients=1 0)
    Body ulna_r: mass=0.76312 mass_center=(0 -0.133981 0) inertia_xx=0.004597925 inertia_yy=0.000959324
        inertia_zz=0.004987553 meshes=ulna_rv.vtp
      CustomJoint elbow_r: parent_body=humerus_r location_in_parent=(0.01385427 -0.3017425 -0.01011349)
          location=(0 0 0)
        Coordinate elbow_flex_r: motion_type=rotational default_value=0 range=(0 2.618) clamped=true
        SpatialTransform: axes_held_at_zero=(rotation2 rotation3 translation1 translation2 translation3)
          TransformAxis rotation1: coordinates=elbow_flex_r axis=(0.226047 0.022269 0.9738618)
              LinearFunction(coefficients=1 0)
    Body radius_r: mass=0.76312 mass_center=(0 -0.133981 0) inertia_xx=0.004597925 inertia_yy=0.000959324
        inertia_zz=0.004987553 meshes=radius_rv.vtp
      CustomJoint radioulnar_r: parent_body=ulna_r location_in_parent=(-0.007478019 -0.01445913 0.02899497)
          location=(0 0 0)
        Coordinate pro_sup_r: motion_type=rotational default_value=0 range=(0 1.570796) clamped=true
        SpatialTransform: axes_held_at_zero=(rotation2 rotation3 translation1 translation2 translation3)
          TransformAxis rotation1: coordinates=pro_sup_r axis=(0.05639803 0.9984065 0.001952)
              LinearFunction(coefficients=1 0)
    Body hand_r: mass=0.5746953 mass_center=(0 -0.0756973 0) inertia_xx=0.001384655 inertia_yy=0.0008491104
        inertia_zz=0.002080088
        meshes=(pisiform_rvs.vtp lunate_rvs.vtp scaphoid_rvs.vtp triquetrum_rvs.vtp hamate_rvs.vtp capitate_rvs.vtp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)
      CustomJoint radius_hand_r: parent_body=radius_r location_in_parent=(-0.009779119 -0.2621709 0.01512945)
          location=(0 0 0)
        Coordinate wrist_flex_r: motion_type=rotational default_value=0 range=(-1.22173 1.22173) clamped=true
            locked=true
        Coordinate wrist_dev_r: motion_type=rotational default_value=0 range=(-0.4363323 0.6108652) clamped=true
            locked=true
        SpatialTransform: axes_held_at_zero=(rotation3 translation1 translation2 translation3)
          TransformAxis rotation1: coordinates=wrist_flex_r axis=(0 0 1) LinearFunction(coefficients=1 0)
          TransformAxis rotation2: coordinates=wrist_dev_r axis=(1 0 0) LinearFunction(coefficients=1 0)
    Body humerus_l: mass=2.176456 mass_center=(0 -0.173391 0) inertia_xx=0.01421196 inertia_yy=0.004902685
        inertia_zz=0.01595247 meshes=humerus_lv.vtp
      CustomJoint acromial_l: parent_body=torso location_in_parent=(0.003120001 0.3673789 -0.1473134) location=(0 0 0)
        Coordinate arm_flex_l: motion_type=rotational default_value=0 range=(-1.570796 1.570796) clamped=true
        Coordinate arm_add_l: motion_type=rotational default_value=0 range=(-2.094395 1.570796) clamped=true
        Coordinate arm_rot_l: motion_type=rotational default_value=0 range=(-1.570796 1.570796) clamped=true
        SpatialTransform: axes_held_at_zero=(translation1 translation2 translation3)
          TransformAxis rotation1: coordinates=arm_flex_l axis=(0 0 1) LinearFunction(coefficients=1 0)
          TransformAxis rotation2: coordinates=arm_add_l axis=(-1 0 0) LinearFunction(coefficients=1 0)
          TransformAxis rotation3: coordinates=arm_rot_l axis=(0 -1 0) LinearFunction(coefficients=1 0)
    Body ulna_l: mass=0.76312 mass_center=(0 -0.133981 0) inertia_xx=0.004597925 inertia_yy=0.000959324
        inertia_zz=0.004987553 meshes=ulna_lv.vtp
      CustomJoint elbow_l: parent_body=humerus_l location_in_parent=(0.01385427 -0.3017425 0.01011349) location=(0 0 0)
        Coordinate elbow_flex_l: motion_type=rotational default_value=0 range=(0 2.618) clamped=true
        SpatialTransform: axes_held_at_zero=(rotation2 rotation3 translation1 translation2 translation3)
          TransformAxis rotation1: coordinates=elbow_flex_l axis=(-0.226047 -0.022269 0.9738618)
              LinearFunction(coefficients=1 0)
    Body radius_l: mass=0.76312 mass_center=(0 -0.133981 0) inertia_xx=0.004597925 inertia_yy=0.000959324
        inertia_zz=0.004987553 meshes=radius_lv.vtp
      CustomJoint radioulnar_l: parent_body=ulna_l location_in_parent=(-0.007478019 -0.01445913 -0.02899497)
          location=(0 0 0)
        Coordinate pro_sup_l: motion_type=rotational default_value=0 range=(0 1.570796) clamped=true
        SpatialTransform: axes_held_at_zero=(rotation2 rotation3 translation1 translation2 translation3)
          TransformAxis rotation1: coordinates=pro_sup_l axis=(-0.05639803 -0.9984065 0.001952)
              LinearFunction(coefficients=1 0)
    Body hand_l: mass=0.5746953 mass_center=(0 -0.0756973 0) inertia_xx=0.001384655 inertia_yy=0.0008491104
        inertia_zz=0.002080088
        meshes=(pisiform_lvs.vtp lunate_lvs.vtp scaphoid_lvs.vtp triquetrum_lvs.vtp hamate_lvs.vtp capitate_lvs.vtp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)
      CustomJoint radius_hand_l: parent_body=radius_l location_in_parent=(-0.009779119 -0.2621709 -0.01512945)
          location=(0 0 0)
        Coordinate wrist_flex_l: motion_type=rotational default_value=0 range=(-1.22173 1.22173) clamped=true
            locked=true
        Coordinate wrist_dev_l: motion_type=rotational default_value=0 range=(-0.4363323 0.6108652) clamped=true
            locked=true
        SpatialTransform: axes_held_at_zero=(rotation3 translation1 translation2 translation3)
          TransformAxis rotation1: coordinates=wrist_flex_l axis=(0 0 1) LinearFunction(coefficients=1 0)
          TransformAxis rotation2: coordinates=wrist_dev_l axis=(-1 0 0) LinearFunction(coefficients=1 0)
  ConstraintSet:
    CoordinateCouplerConstraint patfem_flexion_con: independent_coordinate_names=knee_flexion
        dependent_coordinate_name=patfem_flexion scale_factor=1
        coupled_coordinates_function=LinearFunction(coefficients=1 1.57)
    CoordinateCouplerConstraint patfem_ty_con: isDisabled=true independent_coordinate_names=knee_flexion
        dependent_coordinate_name=patfem_ty scale_factor=1
      coupled_coordinates_function: active_force_length_curve: SimmSpline: x=(0 -0.3927 -0.7854 -1.1781 -1.309 -1.5708)
          y=(0.038 0.039 0.037 0.04 0.04 0.04)
    ConstantDistanceConstraint: isDisabled=true body_1=patella body_2=tibia
        location_body_1=(0.0271613 -0.00803334 -0.00152368) location_body_2=(0.0352296 -0.0773956 0.00396701)
        constant_distance=0.0502
    CoordinateCouplerConstraint patfem_flexion_con_l: independent_coordinate_names=knee_flexion_l
        dependent_coordinate_name=patfem_flexion_l scale_factor=1
        coupled_coordinates_function=LinearFunction(coefficients=1 1.57)
    CoordinateCouplerConstraint patfem_ty_con_l: isDisabled=true independent_coordinate_names=knee_flexion_l
        dependent_coordinate_name=patfem_ty_l scale_factor=1
      coupled_coordinates_function: active_force_length_curve: SimmSpline: x=(0 -0.3927 -0.7854 -1.1781 -1.309 -1.5708)
          y=(0.038 0.039 0.037 0.04 0.04 0.04)
    ConstantDistanceConstraint: isDisabled=true body_1=patella_l body_2=tibia_l
        location_body_1=(0.0271613 -0.00803334 -0.00152368) location_body_2=(0.0352296 -0.0773956 0.00396701)
        constant_distance=0.0502
  ForceSet:
    Ligament patlig_lat: isDisabled=true resting_length=0.034 pcsa_force=1
      PathPoint patlig_lat_p1: tibia (0.0337156 -0.0787752 0.0104097)
      PathPoint patlig_lat_p2: patella (0.0113458 -0.00794241 -0.0166281)
      force_length_curve: SimmSpline: x=(0.0289 0.0306 0.03094 0.03128 0.03162 0.03196 0.0323 0.03264 0.03298 0.03332 0.03366 0.034 0.03434 0.03468 0.03502 0.03536 0.0357 0.03604 0.03638 0.03672 0.03706 0.0374 0.03774 0.03808 0.03842)
          y=(0 0 0 0 0 0 0 0 0 0 0 0 46 115 218.5 322 437 517.5 598 667 736 793.5 828 816.5 828)
    Ligament patlig_center: isDisabled=true resting_length=0.026 pcsa_force=1
      PathPoint patlig_center_p1: tibia (0.0352296 -0.0773956 0.00396701)
      PathPoint patlig_center_p2: patella (0.0271613 -0.00803334 -0.00152368)
      force_length_curve: SimmSpline: x=(0.0221 0.0234 0.02366 0.02392 0.02418 0.02444 0.0247 0.02496 0.02522 0.02548 0.02574 0.026 0.02626 0.02652 0.02678 0.02704 0.0273 0.02756 0.02782 0.02808 0.02834 0.0286 0.02886 0.02912 0.02938)
          y=(0 0 0 0 0 0 0 0 0 0 0 0 46 115 218.5 322 437 517.5 598 667 736 793.5 828 816.5 828)
    Ligament patlig_med: isDisabled=true resting_length=0.03 pcsa_force=1
      PathPoint patlig_med_p1: tibia (0.0340077 -0.0780407 -0.00384338)
      PathPoint patlig_med_p2: patella (0.00893499 -0.0101482 0.0122374)
      force_length_curve: SimmSpline: x=(0.0255 0.027 0.0273 0.0276 0.0279 0.0282 0.0285 0.0288 0.0291 0.0294 0.0297 0.03 0.0303 0.0306 0.0309 0.0312 0.0315 0.0318 0.0321 0.0324 0.0327 0.033 0.0333 0.0336 0.0339)
          y=(0 0 0 0 0 0 0 0 0 0 0 0 46 115 218.5 322 437 517.5 598 667 736 793.5 828 816.5 828)
    Schutte1993Muscle_Deprecated [values shared by the 54 below unless stated]: min_control=0 max_control=1
        optimal_force=1 max_contraction_velocity=10 time_scale=0.1 activation1=7.667 activation2=1.459854 damping=0.1
      tendon_force_length_curve: SimmSpline: x=(-10 -0.002 -0.001 0 0.00131 0.00281 0.00431 0.00581 0.00731 0.00881 0.0103 0.0118 0.0123 9.2 9.201 9.202 20)
          y=(0 0 0 0 0.0108 0.0257 0.0435 0.0652 0.0915 0.123 0.161 0.208 0.227 345 345 345 345)
      active_force_length_curve: SimmSpline: x=(-5.30769 -4.30769 -1.92308 -0.884615 -0.269231 0.230769 0.461538 0.52725 0.62875 0.71875 0.86125 1.045 1.2175 1.43875 1.5 1.61539 2 2.96154 3.69231 5.46154 9.9019)
          y=(0.012188 0.021899 0.036466 0.052493 0.075312 0.114158 0.157859 0.226667 0.636667 0.856667 0.95 0.993333 0.77 0.246667 0.193821 0.133252 0.072683 0.044417 0.036341 0.021899 0.007332)
      passive_force_length_curve: SimmSpline: x=(-5 0.998 0.999 1 1.1 1.2 1.3 1.4 1.5 1.6 1.601 1.602 5)
          y=(0 0 0 0 0.035 0.12 0.26 0.55 1.17 2 2 2 2)
    Schutte1993Muscle_Deprecated addbrev: max_isometric_force=303.7 optimal_fiber_length=0.1031
        tendon_slack_length=0.036 pennation_angle_at_optimal=0.1064651 [radians]
      PathPoint P1: pelvis (-0.01016 -0.10868 0.00878422)
      PathPoint P2: femur (0.016 -0.11644 0.01098)
      PathWrap: wrap_object=AB_at_femshaft method=midpoint range=(-1 2)
    Schutte1993Muscle_Deprecated addlong: max_isometric_force=399.5 optimal_fiber_length=0.1082
        tendon_slack_length=0.13 pennation_angle_at_optimal=0.1235693
      PathPoint P1: pelvis (4.441e-5 -0.101707 0.00954536)
      PathPoint P2: femur (0.0117069 -0.237813 0.00941084)
      PathWrap: wrap_object=AL_at_femshaft method=hybrid
    Schutte1993Muscle_Deprecated addmagProx: max_isometric_force=324.2 optimal_fiber_length=0.1056
        tendon_slack_length=0.043 pennation_angle_at_optimal=0.3872886
      PathPoint P1: pelvis (-0.0166477 -0.116504 0.00666811)
      PathPoint P2: femur (0.0064656 -0.0770491 0.0202418)
      PathWrap: wrap_object=AMprox_at_femshaft method=hybrid
    Schutte1993Muscle_Deprecated addmagMid: max_isometric_force=324.2 optimal_fiber_length=0.1377
        tendon_slack_length=0.048 pennation_angle_at_optimal=0.2567379
      PathPoint P1: pelvis (-0.0373004 -0.13292 0.0185385)
      PathPoint P2: femur (0.0142591 -0.163065 0.0112294)
      PathWrap: wrap_object=AMmid_at_femshaft method=hybrid
    Schutte1993Muscle_Deprecated addmagDist: max_isometric_force=324.2 optimal_fiber_length=0.1772
        tendon_slack_length=0.09 pennation_angle_at_optimal=0.2412045
      PathPoint P1: pelvis (-0.0652249 -0.148257 0.0424825)
      PathPoint P2: femur (0.00982026 -0.267471 0.0171753)
      PathWrap: wrap_object=AMdist_at_femshaft method=hybrid
    Schutte1993Muscle_Deprecated addmagIsch: max_isometric_force=324.2 optimal_fiber_length=0.1562
        tendon_slack_length=0.221 pennation_angle_at_optimal=0.2073451
      PathPoint P1: pelvis (-0.0705571 -0.154914 0.0333897)
      PathPoint P2: femur (-2.433e-5 -0.38782 -0.042028)
      PathWrap: wrap_object=AMisch_at_condyles method=hybrid
    Schutte1993Muscle_Deprecated bflh: max_isometric_force=705.2 optimal_fiber_length=0.0976 tendon_slack_length=0.322
        pennation_angle_at_optimal=0.2021091
      PathPoint P1: pelvis (-0.0847101 -0.14732 0.0511673)
      PathPoint P2: tibia (-0.0239529 -0.0636667 0.0440682)
      PathWrap: wrap_object=BFLH_at_gastroc method=midpoint
      PathWrap: wrap_object=Gastroc_at_Condyles method=midpoint
    Schutte1993Muscle_Deprecated bfsh: max_isometric_force=315.8 optimal_fiber_length=0.1103 tendon_slack_length=0.104
        pennation_angle_at_optimal=0.2151991
      PathPoint P1: femur (0.0114756 -0.20974 0.0127427)
      PathPoint P2: tibia (-0.023 -0.0633 0.0439153)
      PathWrap: wrap_object=BFLH_at_gastroc method=midpoint
      PathWrap: wrap_object=Gastroc_at_Condyles method=hybrid
    Schutte1993Muscle_Deprecated edl: max_isometric_force=345.4 optimal_fiber_length=0.0693 tendon_slack_length=0.3673
        pennation_angle_at_optimal=0.1890192
      PathPoint P1: tibia (-0.0232597 -0.137803 0.0267152)
      PathPoint P2: tibia (0.0218014 -0.430702 0.00938098)
      PathPoint P3: calcaneus (0.099218 0.0282887 0.0203732)
      PathPoint P4: calcaneus (0.158207 0.00362874 0.0165766)
      PathPoint P5: toes (0.0003 0.0047 0.0153)
      PathPoint P6: toes (0.0271976 -0.00359599 0.0207435)
    Schutte1993Muscle_Deprecated ehl: max_isometric_force=165 optimal_fiber_length=0.0748 tendon_slack_length=0.3315
        pennation_angle_at_optimal=0.1647591
      PathPoint P1: tibia (-0.0201065 -0.181123 0.0259021)
      PathPoint P2: tibia (0.00325205 -0.331714 0.0127734)
      PathPoint P3: tibia (0.0225944 -0.411142 -0.00467382)
      PathPoint P4: calcaneus (0.0965032 0.0441332 -0.0023868)
      PathPoint P5: calcaneus (0.130382 0.0300556 -0.00617843)
      PathPoint P6: calcaneus (0.170158 0.015535 -0.0201528)
      PathPoint P7: toes (0.0271107 -0.00172443 -0.0182834)
      PathPoint P8: toes (0.046922 -0.00486119 -0.00998939)
    Schutte1993Muscle_Deprecated fdl: max_isometric_force=274.4 optimal_fiber_length=0.0446 tendon_slack_length=0.3777
        pennation_angle_at_optimal=0.2380629
      PathPoint P1: tibia (-0.0074481 -0.20801 -0.0080927)
      PathPoint P2: tibia (-0.0205345 -0.40306 -0.0165553)
      PathPoint P3: calcaneus (0.0461012 0.0368223 -0.0274203)
      PathPoint P4: calcaneus (0.0719044 0.0221014 -0.0123383)
      PathPoint P5: calcaneus (0.157681 -0.012364 0.0123541)
      PathPoint P6: toes (-0.00149474 -0.00837677 0.0145683)
      PathPoint P7: toes (0.019114 -0.00582471 0.0203981)
      PathPoint P8: toes (0.0308109 -0.0113017 0.0189281)
    Schutte1993Muscle_Deprecated fhl: max_isometric_force=436.8 optimal_fiber_length=0.0527 tendon_slack_length=0.356
        pennation_angle_at_optimal=0.2947861
      PathPoint P1: tibia (-0.0312354 -0.246387 0.0238827)
      PathPoint P2: tibia (-0.0213882 -0.414538 -0.00635739)
      PathPoint P3: calcaneus (0.0231977 0.0327623 -0.0199635)
      PathPoint P4: calcaneus (0.104215 0.0055065 -0.00928277)
      PathPoint P5: calcaneus (0.168699 -0.0101948 -0.0213767)
      PathPoint P6: toes (0.0170311 -0.01422 -0.022915)
      PathPoint P7: toes (0.0482882 -0.0109347 -0.0100238)
    Schutte1993Muscle_Deprecated gaslat: max_isometric_force=606.4 optimal_fiber_length=0.0588
        tendon_slack_length=0.382 pennation_angle_at_optimal=0.2101376
      PathPoint P1: femur (-0.00658017 -0.376393 0.0248665)
      PathPoint P2: calcaneus (0.0038583 0.027473 0.0092621)
      PathWrap: wrap_object=Gastroc_at_Shank method=hybrid
      PathWrap: wrap_object=Gastroc_at_Condyles method=hybrid
    Schutte1993Muscle_Deprecated gasmed: max_isometric_force=1308 optimal_fiber_length=0.051 tendon_slack_length=0.4008
        pennation_angle_at_optimal=0.1724385
      PathPoint P1: femur (-0.00240032 -0.37559 -0.0203178)
      PathPoint P2: calcaneus (0.0038583 0.027473 0.0092621)
      PathWrap: wrap_object=Gastroc_at_Shank method=hybrid
      PathWrap: wrap_object=Gastroc_at_Condyles method=hybrid
    Schutte1993Muscle_Deprecated gem: max_isometric_force=109 optimal_fiber_length=0.024 tendon_slack_length=0.039
        pennation_angle_at_optimal=0
      PathPoint P1: pelvis (-0.0911079 -0.118801 0.0655739)
      PathPoint P2: femur (0.00357191 0.00470814 0.032919)
    Schutte1993Muscle_Deprecated glmax1: max_isometric_force=546.1 optimal_fiber_length=0.1473 tendon_slack_length=0.05
        pennation_angle_at_optimal=0.3829252
      PathPoint P1: pelvis (-0.123254 0.0154394 0.0625357)
      PathPoint P2: pelvis (-0.11044 -0.0540871 0.0834821)
      PathPoint P3: femur (-0.020639 -0.0234406 0.0254473)
      PathPoint P4: femur (-0.00155452 -0.0528737 0.0329135)
      PathWrap: wrap_object=Gmax_at_pelvis method=hybrid
    Schutte1993Muscle_Deprecated glmax2: max_isometric_force=780.5 optimal_fiber_length=0.1569
        tendon_slack_length=0.0733 pennation_angle_at_optimal=0.3829252
      PathPoint P1: pelvis (-0.137055 -0.022148 0.0446254)
      PathPoint P2: pelvis (-0.122872 -0.101739 0.0751803)
      PathPoint P3: femur (-0.0243614 -0.05425 0.012997)
      PathPoint P4: femur (0.0050648 -0.098331 0.028995)
      PathWrap: wrap_object=Gmax_at_pelvis method=hybrid
    Schutte1993Muscle_Deprecated glmax3: max_isometric_force=526.1 optimal_fiber_length=0.1665
        tendon_slack_length=0.0702 pennation_angle_at_optimal=0.3829252
      PathPoint P1: pelvis (-0.125622 -0.0950969 0.00701097)
      PathPoint P2: pelvis (-0.10724 -0.15437 0.031167)
      PathPoint P3: femur (-0.0166256 -0.108169 -0.00184662)
      PathPoint P4: femur (0.011721 -0.13932 0.029689)
      PathWrap: wrap_object=Gmax_at_pelvis method=hybrid
    Schutte1993Muscle_Deprecated glmed1: max_isometric_force=881.1 optimal_fiber_length=0.0733
        tendon_slack_length=0.0565 pennation_angle_at_optimal=0.3572689
      PathPoint P1: pelvis (-0.0418558 0.00239005 0.11521)
      PathPoint P2: femur (0.0100656 0.0135162 0.0475944)
    Schutte1993Muscle_Deprecated glmed2: max_isometric_force=616.5 optimal_fiber_length=0.0733
        tendon_slack_length=0.066 pennation_angle_at_optimal=0.3572689
      PathPoint P1: pelvis (-0.103957 -0.00016708 0.0757173)
      PathPoint P2: femur (0.00447766 0.0120907 0.0484425)
    Schutte1993Muscle_Deprecated glmed3: max_isometric_force=702 optimal_fiber_length=0.0733 tendon_slack_length=0.046
        pennation_angle_at_optimal=0.3572689
      PathPoint P1: pelvis (-0.116833 -0.0424989 0.0537397)
      PathPoint P2: femur (-0.00107329 0.0142915 0.048484)
    Schutte1993Muscle_Deprecated glmin1: max_isometric_force=180 optimal_fiber_length=0.068 tendon_slack_length=0.016
        pennation_angle_at_optimal=0.1745329
      PathPoint P1: pelvis (-0.0479036 -0.0352697 0.09861)
      PathPoint P2: femur (0.025055 0.0125171 0.0393372)
    Schutte1993Muscle_Deprecated glmin2: max_isometric_force=190 optimal_fiber_length=0.056 tendon_slack_length=0.026
        pennation_angle_at_optimal=0
      PathPoint P1: pelvis (-0.0626675 -0.03911 0.0962608)
      PathPoint P2: femur (0.0214709 0.0134478 0.0420665)
    Schutte1993Muscle_Deprecated glmin3: max_isometric_force=215 optimal_fiber_length=0.038 tendon_slack_length=0.051
        pennation_angle_at_optimal=0.01745329
      PathPoint P1: pelvis (-0.0773615 -0.0420308 0.0861945)
      PathPoint P2: femur (0.0179308 0.0149187 0.0444784)
    Schutte1993Muscle_Deprecated grac: max_isometric_force=137.3 optimal_fiber_length=0.2278 tendon_slack_length=0.169
        pennation_angle_at_optimal=0.1424189
      PathPoint P1: pelvis (-0.05657 -0.14967 0.0211631)
      PathPoint P2: tibia (-0.0272268 -0.0580037 -0.039902)
      PathPoint P3: tibia (-0.01 -0.08307 -0.022325)
      PathWrap: wrap_object=GR_at_condyles method=midpoint
    Schutte1993Muscle_Deprecated iliacus: max_isometric_force=621.9 optimal_fiber_length=0.1066
        tendon_slack_length=0.094 pennation_angle_at_optimal=0.2494076
      PathPoint P1: pelvis (-0.0843042 0.0156716 0.0906138)
      PathPoint P2: pelvis (-0.00700971 -0.066974 0.0695776)
      PathPoint P3: femur (0.0205964 -0.0446609 0.0052337)
      PathPoint P4: femur (0.0100094 -0.0613455 0.00822215)
      PathWrap: wrap_object=IL_at_brim method=hybrid range=(2 3)
    Schutte1993Muscle_Deprecated pect: max_isometric_force=177 optimal_fiber_length=0.133 tendon_slack_length=0.001
        pennation_angle_at_optimal=0
      PathPoint P1: pelvis (-0.014999 -0.097422 0.035944)
      PathPoint P2: femur (0.00948485 -0.0883126 0.0134163)
      PathWrap: wrap_object=PECT_at_femshaft method=hybrid
    Schutte1993Muscle_Deprecated perbrev: max_isometric_force=305.9 optimal_fiber_length=0.0454
        tendon_slack_length=0.1481 pennation_angle_at_optimal=0.2000147
      PathPoint P1: tibia (-0.02702 -0.28501 0.020622)
      PathPoint P2: tibia (-0.0277589 -0.428609 0.0252661)
      PathPoint P3: tibia (-0.024764 -0.444075 0.0299375)
      PathPoint P4: calcaneus (0.0409317 0.0207343 0.0223802)
      PathPoint P5: calcaneus (0.0770353 -0.00410301 0.0363656)
    Schutte1993Muscle_Deprecated perlong: max_isometric_force=653.3 optimal_fiber_length=0.0508
        tendon_slack_length=0.333 pennation_angle_at_optimal=0.2457424
      PathPoint P1: tibia (-0.0196031 -0.158507 0.0338632)
      PathPoint P2: tibia (-0.0251179 -0.429106 0.022048)
      PathPoint P3: tibia (-0.0243149 -0.444836 0.0317903)
      PathPoint P4: calcaneus (0.0423413 0.00786125 0.0299854)
      PathPoint P5: calcaneus (0.0773556 -0.0121349 0.0330053)
      PathPoint P6: calcaneus (0.0886694 -0.00014163 0.018814)
      PathPoint P7: calcaneus (0.120313 0.00216098 -0.0103352)
    Schutte1993Muscle_Deprecated pertert: max_isometric_force=90 optimal_fiber_length=0.079 tendon_slack_length=0.1
        pennation_angle_at_optimal=0.2268928
      PathPoint P1: tibia (-0.0141017 -0.284484 0.0271239)
      PathPoint P2: tibia (0.0228646 -0.421737 0.010816)
      PathPoint P3: calcaneus (0.0912228 -0.00078639 0.037115)
    Schutte1993Muscle_Deprecated piri: max_isometric_force=296 optimal_fiber_length=0.026 tendon_slack_length=0.115
        pennation_angle_at_optimal=0.1745329
      PathPoint P1: pelvis (-0.109229 -0.0299997 0.0174938)
      PathPoint P2: pelvis (-0.105719 -0.0583711 0.0594134)
      PathPoint P3: femur (-0.00475648 0.0150833 0.0295108)
      PathPoint P4: femur (0.0172101 0.00987443 0.0263959)
      PathWrap: wrap_object=Gmax_at_pelvis method=midpoint
    Schutte1993Muscle_Deprecated psoas: max_isometric_force=479.7 optimal_fiber_length=0.1169 tendon_slack_length=0.097
        pennation_angle_at_optimal=0.1860521
      PathPoint P1: pelvis (-0.069374 0.04125 0.036913)
      PathPoint P2: pelvis (-0.014819 -0.08046 0.054)
      PathPoint P3: femur (0.00181807 -0.0521636 0.00239342)
      PathWrap: wrap_object=PS_at_brim method=hybrid range=(2 3)
    Schutte1993Muscle_Deprecated quadfem: max_isometric_force=254 optimal_fiber_length=0.054 tendon_slack_length=0.024
        pennation_angle_at_optimal=0
      PathPoint P1: pelvis (-0.0870206 -0.124805 0.0623811)
      PathPoint P2: femur (-0.00774709 -0.0303539 0.0210763)
    Schutte1993Muscle_Deprecated recfem_withreallength: max_isometric_force=848.8 optimal_fiber_length=0.0759
        tendon_slack_length=0.346 pennation_angle_at_optimal=0.2431244
      PathPoint recfem-P1: pelvis (-0.01498 -0.0459654 0.0916399)
      PathPoint recfem-P2: patella (-0.02 -0.01 0.0007)
      PathPoint default: patella (-0.0147 -0.0121 0.001)
      PathWrap: wrap_object=IL_at_brim method=hybrid
      PathWrap: wrap_object=femoral_component_obstruction method=hybrid
    Schutte1993Muscle_Deprecated recfem: max_isometric_force=848.8 optimal_fiber_length=0.0759
        tendon_slack_length=0.346 pennation_angle_at_optimal=0.2431244
      PathPoint P1: pelvis (-0.01498 -0.0459654 0.0916399)
      PathPoint P2: patella (-0.02 -0.01 0.0007)
      PathPoint default: patella (-0.0147 -0.0121 0.001)
      PathPoint default: patella (0.0271613 -0.0080334 -0.0015238)
      PathPoint P4: tibia (0.0352296 -0.0773956 0.003967)
      PathWrap: wrap_object=IL_at_brim method=hybrid
      PathWrap: wrap_object=femoral_component_obstruction method=hybrid
      PathWrap: wrap_object=patella_surface_ellipsoid method=hybrid
    Schutte1993Muscle_Deprecated sart: max_isometric_force=113.5 optimal_fiber_length=0.403 tendon_slack_length=0.11
        pennation_angle_at_optimal=0.02321288
      PathPoint P1: pelvis (-0.0181341 -0.0117312 0.110757)
      PathPoint P2: femur (-0.00486797 -0.356204 -0.0510337)
      PathPoint P3: tibia (-0.033186 -0.0506 -0.040673)
      PathPoint P4: tibia (-0.02314 -0.07238 -0.031414)
      PathPoint P5: tibia (0.0083216 -0.09559 -0.025)
      PathWrap: wrap_object=IL_at_brim method=midpoint
    Schutte1993Muscle_Deprecated semimem: max_isometric_force=1162.7 optimal_fiber_length=0.069
        tendon_slack_length=0.378 pennation_angle_at_optimal=0.2633702
      PathPoint P1: pelvis (-0.0823662 -0.150275 0.0498304)
      PathPoint P2: tibia (-0.0225397 -0.0621311 -0.0272794)
      PathWrap: wrap_object=SM_at_condyles method=hybrid
    Schutte1993Muscle_Deprecated semiten: max_isometric_force=301.9 optimal_fiber_length=0.193
        tendon_slack_length=0.245 pennation_angle_at_optimal=0.2244493
      PathPoint P1: pelvis (-0.085264 -0.15053 0.039379)
      PathPoint P2: tibia (-0.0391965 -0.0627504 -0.0257523)
      PathPoint P3: tibia (-0.00439952 -0.0962821 -0.0173163)
      PathWrap: wrap_object=ST_at_condyles method=midpoint
    Schutte1993Muscle_Deprecated soleus: max_isometric_force=3585.9 optimal_fiber_length=0.044
        tendon_slack_length=0.2815 pennation_angle_at_optimal=0.4930555
      PathPoint P1: tibia (-0.00952741 -0.109273 -0.00216198)
      PathPoint P2: calcaneus (-0.00684646 0.0241781 -0.00876868)
    Schutte1993Muscle_Deprecated tfl: max_isometric_force=155 optimal_fiber_length=0.095 tendon_slack_length=0.45
        pennation_angle_at_optimal=0.05235988
      PathPoint P1: pelvis (-0.0372141 0.00153935 0.120815)
      PathPoint P2: femur (0.054578 -0.099538 0.048634)
      PathPoint P3: femur (0.00561017 -0.403558 0.041359)
      PathPoint P4: tibia (0.00791302 -0.0623257 0.0386818)
      PathWrap: wrap_object=IL_at_brim method=midpoint
    Schutte1993Muscle_Deprecated tibant: max_isometric_force=673.7 optimal_fiber_length=0.0683
        tendon_slack_length=0.241 pennation_angle_at_optimal=0.1668535
      PathPoint P1: tibia (0.0114559 -0.15384 0.00890924)
      PathPoint P2: tibia (0.0271135 -0.219739 0.00568161)
      PathPoint P3: tibia (0.0166865 -0.40983 -0.02165)
      PathPoint P4: calcaneus (0.1162 0.0271709 -0.012)
    Schutte1993Muscle_Deprecated tibpost: max_isometric_force=905.6 optimal_fiber_length=0.0378
        tendon_slack_length=0.2818 pennation_angle_at_optimal=0.2392846
      PathPoint P1: tibia (-0.0081867 -0.14993 0.0041181)
      PathPoint P2: tibia (-0.0199469 -0.408878 -0.0198549)
      PathPoint P3: calcaneus (0.029386 0.0451177 -0.0216523)
      PathPoint P4: calcaneus (0.0758562 0.0369366 -0.020146)
    Schutte1993Muscle_Deprecated vasint_withreallength: max_isometric_force=1024.2 optimal_fiber_length=0.0993
        tendon_slack_length=0.106 pennation_angle_at_optimal=0.07923795
      PathPoint vasint-P1: femur (0.0393017 -0.190661 0.0208607)
      PathPoint vasint-P2: femur (0.0435557 -0.209799 0.0177407)
      PathPoint default: patella (-0.0175412 -0.00246856 -0.00135876)
      PathWrap: wrap_object=femoral_component_obstruction method=hybrid
    Schutte1993Muscle_Deprecated vasint: max_isometric_force=1024.2 optimal_fiber_length=0.0993
        tendon_slack_length=0.106 pennation_angle_at_optimal=0.07923795
      PathPoint P1: femur (0.0393017 -0.190661 0.0208607)
      PathPoint P2: femur (0.0435557 -0.209799 0.0177407)
      PathPoint default: patella (-0.0175412 -0.00246856 -0.00135876)
      PathPoint P4: patella (0.0240534 -0.01135 -0.00361)
      PathPoint P4: tibia (0.0352296 -0.0773956 0.004)
      PathWrap: wrap_object=femoral_component_obstruction method=hybrid
      PathWrap: wrap_object=patella_surface_ellipsoid method=hybrid range=(3 4)
    Schutte1993Muscle_Deprecated vaslat_withreallength: max_isometric_force=2255.4 optimal_fiber_length=0.0994
        tendon_slack_length=0.13 pennation_angle_at_optimal=0.3207915
      PathPoint vaslat-P1: femur (0.0105256 -0.178473 0.0157434)
      PathPoint vaslat-P2: femur (0.0260243 -0.25846 0.0349263)
      PathPoint default: patella (-0.0149845 -0.00551761 -0.0135415)
      PathWrap: wrap_object=femoral_component_obstruction method=hybrid
    Schutte1993Muscle_Deprecated vaslat: max_isometric_force=2255.4 optimal_fiber_length=0.0994
        tendon_slack_length=0.13 pennation_angle_at_optimal=0.3207915
      PathPoint P1: femur (0.0105256 -0.178473 0.0157434)
      PathPoint P2: femur (0.0260243 -0.25846 0.0349263)
      PathPoint default: patella (-0.0149845 -0.00551761 -0.0135415)
      PathPoint P4: patella (0.019 -0.01 -0.016)
      PathPoint P5: tibia (0.0352296 -0.077 0.014)
      PathWrap: wrap_object=femoral_component_obstruction method=hybrid
      PathWrap: wrap_object=patella_surface_ellipsoid method=hybrid
    Schutte1993Muscle_Deprecated vasmed_withreallength: max_isometric_force=1443.7 optimal_fiber_length=0.0968
        tendon_slack_length=0.112 pennation_angle_at_optimal=0.516792
      PathPoint vasmed-P1: femur (0.024 -0.20954 0)
      PathPoint vasmed-P2: femur (0.044364 -0.27875 -0.0092019)
      PathPoint default: patella (-0.0128949 -0.00623904 0.0116237)
      PathWrap: wrap_object=femoral_component_obstruction method=hybrid
    Schutte1993Muscle_Deprecated vasmed: max_isometric_force=1443.7 optimal_fiber_length=0.0968
        tendon_slack_length=0.112 pennation_angle_at_optimal=0.516792
      PathPoint P1: femur (0.024 -0.20954 0)
      PathPoint P2: femur (0.044364 -0.27875 -0.0092019)
      PathPoint default: patella (-0.0128949 -0.00623904 0.0116237)
      PathPoint default: patella (0.0185056 -0.0129756 0.0106754)
      PathPoint P5: tibia (0.0352296 -0.0773956 -0.006)
      PathWrap: wrap_object=femoral_component_obstruction method=hybrid
      PathWrap: wrap_object=patella_surface_ellipsoid method=hybrid
    Schutte1993Muscle_Deprecated ercspn_r: max_isometric_force=2500 optimal_fiber_length=0.1152032
        tendon_slack_length=0.02880079 pennation_angle_at_optimal=0
      PathPoint P1: pelvis (-0.135204 0.042396 0.0429894)
      PathPoint P2: torso (-0.0490605 0.105361 0.0214974)
    Schutte1993Muscle_Deprecated ercspn_l: max_isometric_force=2500 optimal_fiber_length=0.1152032
        tendon_slack_length=0.02880079 pennation_angle_at_optimal=0
      PathPoint P1: pelvis (-0.135204 0.042396 -0.0429894)
      PathPoint P2: torso (-0.0490605 0.105361 -0.0214974)
    Schutte1993Muscle_Deprecated intobl_r: max_isometric_force=900 optimal_fiber_length=0.09683367
        tendon_slack_length=0.09683367 pennation_angle_at_optimal=0
      PathPoint P1: pelvis (-0.0386296 0.0676018 0.11408)
      PathPoint P2: torso (0.0624406 0.153253 0.0133801)
    Schutte1993Muscle_Deprecated intobl_l: max_isometric_force=900 optimal_fiber_length=0.09683367
        tendon_slack_length=0.09683367 pennation_angle_at_optimal=0
      PathPoint P1: pelvis (-0.0386296 0.0676018 -0.11408)
      PathPoint P2: torso (0.0624406 0.153253 -0.0133801)
    Schutte1993Muscle_Deprecated extobl_r: max_isometric_force=900 optimal_fiber_length=0.1143157
        tendon_slack_length=0.1333683 pennation_angle_at_optimal=0
      PathPoint P1: pelvis (-0.0289722 -0.061421 0.00985996)
      PathPoint P2: torso (0.0579806 0.105361 0.098121)
    Schutte1993Muscle_Deprecated extobl_l: max_isometric_force=900 optimal_fiber_length=0.1143157
        tendon_slack_length=0.1333683 pennation_angle_at_optimal=0
      PathPoint P1: pelvis (-0.0289722 -0.061421 -0.00985996)
      PathPoint P2: torso (0.0579806 0.105361 -0.098121)
    ObjectGroup hip_add: members=(addbrev addlong addmagDist addmagIsch addmagMid addmagProx bflh grac pect semimem semiten)
    ObjectGroup hip_flex: members=(addbrev addlong glmin1 grac iliacus pect psoas recfem sart tfl)
    ObjectGroup hip_ext: members=(addlong addmagDist addmagIsch addmagMid addmagProx bflh glmax1 glmax2 glmax3 glmed1 glmed2 glmed3 glmin3 semimem semiten)
    ObjectGroup knee_flex: members=(bflh bfsh gaslat gasmed grac sart semimem semiten)
    ObjectGroup ankle_df: members=(edl ehl pertert tibant)
    ObjectGroup everter: members=(edl perbrev perlong pertert)
    ObjectGroup inverter: members=(ehl fdl fhl tibant tibpost)
    ObjectGroup ankle_pf: members=(fdl fhl gaslat gasmed perbrev perlong soleus tibpost)
    ObjectGroup hip_exrot: members=(gem glmin3 piri quadfem)
    ObjectGroup hip_abd: members=(glmax1 glmed1 glmed2 glmed3 glmin1 glmin2 glmin3 piri sart tfl)
    ObjectGroup hip_inrot: members=(glmed1 glmed2 glmed3 glmin1 iliacus psoas tfl)
    ObjectGroup knee_ext: members=(recfem vasint vaslat vasmed)
  MarkerSet:
    Marker Sternum: torso (0.0984501 0.325296 0.0114103)
    Marker Neck: torso (-0.0651455 0.395163 0.00445025)
    Marker R.Shoulder: torso (-0.00975713 0.367569 0.187064)
    Marker L.Shoulder: torso (-0.00349079 0.358301 -0.174043)
    Marker Xiphoid: torso (0.127706 0.210155 0.00768206)
    Marker Thoracic: torso (-0.0910806 0.186966 0.000920065)
    Marker R.Psis: pelvis (-0.160402 0.00462701 0.0213894)
    Marker L.Psis: pelvis (-0.156142 0.0101893 -0.0372211)
    Marker Lumbar: torso (-0.0448171 -0.0184616 -0.00085577)
    Marker R.Elbow: humerus_r (0.0247991 -0.347215 -0.0831137)
    Marker R.ShoulderAnterior: humerus_r (-0.0134183 -0.0647012 0.0368966)
    Marker R.ShoulderPosterior: humerus_r (-0.0109684 -0.0585352 -0.0685764)
    Marker R.Wrist: radius_r (-0.0317194 -0.277271 0.00494963)
    Marker R.Ulna: ulna_r (-0.00546412 -0.298039 0.0034845)
    Marker R.Radius: radius_r (-0.0330015 -0.262458 0.0417715)
    Marker L.Elbow: humerus_l (0.00643977 -0.344738 0.0580946)
    Marker L.ShoulderAnterior: humerus_l (0.000353813 -0.059409 -0.0429571)
    Marker L.ShoulderPosterior: humerus_l (0.00560634 -0.0660283 0.0677199)
    Marker L.Wrist: radius_l (-0.0377453 -0.28175 -0.013137)
    Marker L.Radius: radius_l (-0.0222883 -0.255535 -0.0460027)
    Marker L.Ulna: ulna_l (-0.018454 -0.308043 -0.0060181)
    Marker R.Heel: calcaneus (-0.0560317 0.0269354 -0.0232359)
    Marker R.Midfoot.Superior: calcaneus (0.112118 0.07824 0.0125887)
    Marker R.Midfoot.Lateral: calcaneus (0.138056 -0.00330729 0.0576038)
    Marker R.Toe: toes (0.0649414 0.00250711 0.0137919)
    Marker R.Ankle.Lateral: tibia (-0.0234465 -0.422741 0.0435785)
    Marker R.Shank.Superior: tibia (-0.0259529 -0.121609 0.0749943)
    Marker R.Shank.Inferior: tibia (-0.0135059 -0.357811 0.0353866)
    Marker R.Shank.Lateral: tibia (0.0287772 -0.257456 -0.00961571)
    Marker R.Knee.Lateral: femur (-0.0057099 -0.397912 0.0564659)
    Marker R.Knee.Medial: femur (-0.00477352 -0.388852 -0.0722471)
    Marker R.Patella: patella (-0.000330119 -0.0310779 0.00506725)
    Marker R.Thigh.Superior: femur (0.0291078 -0.0849179 0.0960032)
    Marker R.Thigh.Inferior: femur (0.0471 -0.322805 0.0452626)
    Marker R.Asis: pelvis (0.0515054 0.00669115 0.142311)
    Marker L.Asis: pelvis (0.0567646 0.00562849 -0.127017)
    Marker R.Thigh.Lateral: femur (0.0903495 -0.230073 0.0214615)
    Marker R.Hindfoot: calcaneus (0.0578011 -0.0191942 0.0437442)
    Marker L.Heel: calcaneus_l (-0.044392 0.02611 -0.00787212)
    Marker L.Midfoot.Superior: calcaneus_l (0.107016 0.112338 0.0136743)
    Marker L.Midfoot.Lateral: calcaneus_l (0.159856 0.0560276 -0.0576302)
    Marker L.Toe: toes_l (0.0878541 0.0623215 0.00897447)
    Marker L.Ankle.Lateral: tibia_l (-0.019771 -0.403008 -0.0283237)
    Marker L.Ankle.Medial: tibia_l (-0.00544893 -0.390311 0.0599089)
    Marker L.Shank.Superior: tibia_l (-0.00762136 -0.068073 -0.0470547)
    Marker L.Shank.Inferior: tibia_l (-0.0104802 -0.328901 -0.0228522)
    Marker L.Shank.Lateral: tibia_l (0.0252642 -0.201386 0.0240263)
    Marker L.Knee.Lateral: femur_l (-0.0228852 -0.373824 -0.0524937)
    Marker L.Knee.Medial: femur_l (-0.0157993 -0.375929 0.0772798)
    Marker L.Patella: patella_l (0.0021345 0.0412169 0.00253319)
    Marker L.Thigh.Superior: femur_l (0.00957544 -0.0700312 -0.105507)
    Marker L.Thigh.Inferior: femur_l (0.0106134 -0.313743 -0.0548085)
    Marker R.WristCenter: hand_r (0 0 0) fixed=true
    Marker L.WristCenter: hand_l (-8.98876e-5 -0.0127799 -0.00113114)
